OpenVSP model (file version 5), 4 components.
Geometry view with OpenVSP parameter names; values to 6 digits, angles in degrees, lengths in the model's unit.
Overall bounding box: X_Min=-0.19 X_Len=1.73 Y_Min=-1.88265 Y_Len=3.7653 Z_Min=-0.135396 Z_Len=0.57752

Stack "Fuselage (Stack)"
  location (X Y Z) -0.19 0 0, rotation 0 0 0
  bounding box size 1.73 0.317748 0.264785
  mass: Density=1 Shell_Flag=0 Mass_Area=1 Mass_Prior=3
  cross sections:
    n  CurveBasis  VAlign  XDelta  XRotateAbs  XSAbsRelFlag  YDelta  YRotateAbs  ZDelta  ZRotateAbs  shape
    0  0           0       0       0           1             0       0           0       0           point
    1  0           0       0.2     0           1             0       0           0       0           general fuselage BotStr=1.5 BotTanAngle=90 CornerRad=0 Height=0.25 LowStr=1.5 MaxWidthLoc=0 TopStr=1.5 TopTanAngle=90 UpStr=1.5 Width=0.3
    2  0           0       0.15    0           1             0       0           0       0           as above
    3  0           0       0.75    0           1             0       0           0.0594  0           general fuselage BotStr=1.5 BotTanAngle=90 CornerRad=0 Height=0.02 LowStr=1.5 MaxWidthLoc=0 TopStr=1.5 TopTanAngle=90 UpStr=1.5 Width=0.02
    4  0           0       0.53    0           1             0       0           0       0           as above
    5  0           0       0.1     0           1             0       0           0       0           point

Wing "Main Wing", child of "Fuselage (Stack)"
  location (X Y Z) 0.07371 0.08 0, rotation 0 0 0; relative location 0.26371 0.08 0, rotation 0 0 0
  symmetric about XZ
  bounding box size 0.308451 3.7653 0.0375274
  totals: TotalSpan=3.57771 TotalProjectedSpan=3.57771 TotalChord=0.223607 TotalArea=0.8 TotalAR=16 MAC=0.234331
  root: chord 0.308423, twist 0, NACA 4-series Camber=0.02 CamberLoc=0.4 ThickChord=0.12
  sections:
    n  Span     Root_Chord  Tip_Chord  Area  Sweep  Sweep_Location  Dihedral  Twist  Twist_Location  tip airfoil
    1  1.78885  0.308423    0.13879    0.4   0      0.5             0         0      0.25            NACA 4-series Camber=0 CamberLoc=0.2 ThickChord=0.1

Wing "Horizontal stabilizer", child of "Fuselage (Stack)"
  location (X Y Z) 1.31 0.009 0.0594, rotation 0 0 0; relative location 1.5 0.009 0.0594, rotation 0 0 0
  symmetric about XZ
  bounding box size 0.0960584 0.766248 0.00961142
  totals: TotalSpan=0.734847 TotalProjectedSpan=0.734847 TotalChord=0.0816497 TotalArea=0.06 TotalAR=9 MAC=0.0824972
  root: chord 0.0960584, twist 0, NACA 4-series Camber=0 CamberLoc=0.2 ThickChord=0.1
  sections:
    n  Span      Root_Chord  Tip_Chord  Area  Sweep  Sweep_Location  Dihedral  Twist  Twist_Location  tip airfoil
    1  0.367423  0.0960584   0.0672409  0.03  0      0.5             0         0      0.25            as above

Wing "vertical stabilizer", child of "Fuselage (Stack)"
  location (X Y Z) 1.31 0 0.068, rotation 90 0 0; relative location 1.5 0 0.068, rotation 90 0 0
  bounding box size 0.0960584 0.00961142 0.374124
  totals: TotalSpan=0.367423 TotalProjectedSpan=0.367423 TotalChord=0.0816497 TotalArea=0.03 TotalAR=4.5 MAC=0.0824972
  root: chord 0.0960584, twist 0, NACA 4-series Camber=0 CamberLoc=0.2 ThickChord=0.1
  sections:
    n  Span      Root_Chord  Tip_Chord  Area  Sweep  Sweep_Location  Dihedral  Twist  Twist_Location  tip airfoil
    1  0.367423  0.0960584   0.0672409  0.03  0      0.5             0         0      0.25            as above

VSPAERO settings (reference component "Main Wing"): Sref=0.8 bref=3.57771 cref=0.223607 Xcg=0 Ycg=0 Zcg=0 AlphaStart=10 AlphaEnd=10 AlphaNpts=1 BetaStart=0 BetaEnd=0 BetaNpts=1 MachStart=0 MachEnd=0 MachNpts=1 ReCref=1e+06 Vinf=100 Rho=0.002377
