OpenVSP model (file version 5), 5 components.
Geometry view with OpenVSP parameter names; values to 6 digits, angles in degrees, lengths in the model's unit.
Overall bounding box: X_Min=0 X_Len=1.90575 Y_Min=-0.908125 Y_Len=1.81625 Z_Min=-0.105625 Z_Len=0.536749

Ellipsoid "CG_Marker"
  location (X Y Z) 0.51 0 0, rotation 0 0 0
  bounding box size 0.02 0.02 0.02
  Design: A_Radius=0.01 B_Radius=0.01 C_Radius=0.01

Stack "ARDEA_D3_Stack"
  location (X Y Z) 0 0 0, rotation 0 0 0
  bounding box size 1.90575 0.390177 0.25248
  cross sections:
    n   CurveBasis  VAlign  XDelta     XRotateAbs  XSAbsRelFlag  YDelta  YRotateAbs  ZDelta      ZRotateAbs  shape
    0   0           0       0          0           1             0       0           0           0           point
    1   0           0       0.024486   0           1             0       0           -0.0001155  0           super ellipse Super_Height=0.0488565 Super_M=2 Super_M_bot=2 Super_MaxWidthLoc=0 Super_N=2 Super_N_bot=2 Super_TopBotSym=0 Super_Width=0.0493185
    2   0           0       0.0266805  0           1             0       0           0.0001155   0           super ellipse Super_Height=0.0888195 Super_M=2.08 Super_M_bot=2.08 Super_MaxWidthLoc=0 Super_N=2.08 Super_N_bot=2.08 Super_TopBotSym=0 Super_Width=0.097713
    3   0           0       0.0306075  0           1             0       0           0.0005775   0           super ellipse Super_Height=0.126473 Super_M=2.21 Super_M_bot=2.21 Super_MaxWidthLoc=0 Super_N=2.21 Super_N_bot=2.21 Super_TopBotSym=0 Super_Width=0.155925
    4   0           0       0.0363825  0           1             0       0           0.001848    0           super ellipse Super_Height=0.162971 Super_M=2.42 Super_M_bot=2.42 Super_MaxWidthLoc=0 Super_N=2.42 Super_N_bot=2.42 Super_TopBotSym=0 Super_Width=0.223608
    5   0           0       0.043659   0           1             0       0           0.0033495   0           super ellipse Super_Height=0.196235 Super_M=2.7 Super_M_bot=2.7 Super_MaxWidthLoc=0 Super_N=2.7 Super_N_bot=2.7 Super_TopBotSym=0 Super_Width=0.289559
    6   0           0       0.051744   0           1             0       0           0.004389    0           super ellipse Super_Height=0.222569 Super_M=2.99 Super_M_bot=2.99 Super_MaxWidthLoc=0 Super_N=2.99 Super_N_bot=2.99 Super_TopBotSym=0 Super_Width=0.340032
    7   0           0       0.0604065  0           1             0       0           0.00462     0           super ellipse Super_Height=0.239663 Super_M=3.17 Super_M_bot=3.17 Super_MaxWidthLoc=0 Super_N=3.17 Super_N_bot=3.17 Super_TopBotSym=0 Super_Width=0.369831
    8   0           0       0.069069   0           1             0       0           0.003927    0           super ellipse Super_Height=0.247517 Super_M=3.16 Super_M_bot=3.16 Super_MaxWidthLoc=0 Super_N=3.16 Super_N_bot=3.16 Super_TopBotSym=0 Super_Width=0.385193
    9   0           0       0.0772695  0           1             0       0           0.003003    0           super ellipse Super_Height=0.248094 Super_M=2.91 Super_M_bot=2.91 Super_MaxWidthLoc=0 Super_N=2.91 Super_N_bot=2.91 Super_TopBotSym=0 Super_Width=0.388311
    10  0           0       0.0844305  0           1             0       0           0.0031185   0           super ellipse Super_Height=0.242897 Super_M=2.51 Super_M_bot=2.51 Super_MaxWidthLoc=0 Super_N=2.51 Super_N_bot=2.51 Super_TopBotSym=0 Super_Width=0.374913
    11  0           0       0.09009    0           1             0       0           0.002541    0           super ellipse Super_Height=0.229845 Super_M=2.18 Super_M_bot=2.18 Super_MaxWidthLoc=0 Super_N=2.18 Super_N_bot=2.18 Super_TopBotSym=0 Super_Width=0.355394
    12  0           0       0.094248   0           1             0       0           0.0026565   0           super ellipse Super_Height=0.212174 Super_M=2.07 Super_M_bot=2.07 Super_MaxWidthLoc=0 Super_N=2.07 Super_N_bot=2.07 Super_TopBotSym=0 Super_Width=0.335759
    13  0           0       0.096327   0           1             0       0           0.0035805   0           super ellipse Super_Height=0.19046 Super_M=2.02 Super_M_bot=2.02 Super_MaxWidthLoc=0 Super_N=2.02 Super_N_bot=2.02 Super_TopBotSym=0 Super_Width=0.313467
    14  0           0       0.096327   0           1             0       0           0.0042735   0           super ellipse Super_Height=0.16632 Super_M=2 Super_M_bot=2 Super_MaxWidthLoc=0 Super_N=2 Super_N_bot=2 Super_TopBotSym=0 Super_Width=0.284592
    15  0           0       0.094248   0           1             0       0           0.0042735   0           super ellipse Super_Height=0.141026 Super_M=2 Super_M_bot=2 Super_MaxWidthLoc=0 Super_N=2 Super_N_bot=2 Super_TopBotSym=0 Super_Width=0.249249
    16  0           0       0.09009    0           1             0       0           0.003927    0           super ellipse Super_Height=0.116309 Super_M=2 Super_M_bot=2 Super_MaxWidthLoc=0 Super_N=2 Super_N_bot=2 Super_TopBotSym=0 Super_Width=0.211712
    17  0           0       0.0844305  0           1             0       0           0.0033495   0           super ellipse Super_Height=0.0934395 Super_M=2 Super_M_bot=2 Super_MaxWidthLoc=0 Super_N=2 Super_N_bot=2 Super_TopBotSym=0 Super_Width=0.175791
    18  0           0       0.0772695  0           1             0       0           0.002772    0           super ellipse Super_Height=0.073458 Super_M=2 Super_M_bot=2 Super_MaxWidthLoc=0 Super_N=2 Super_N_bot=2 Super_TopBotSym=0 Super_Width=0.143682
    19  0           0       0.069069   0           1             0       0           0.002079    0           super ellipse Super_Height=0.057057 Super_M=2 Super_M_bot=2 Super_MaxWidthLoc=0 Super_N=2 Super_N_bot=2 Super_TopBotSym=0 Super_Width=0.116655
    20  0           0       0.0604065  0           1             0       0           0.000924    0           super ellipse Super_Height=0.0446985 Super_M=2 Super_M_bot=2 Super_MaxWidthLoc=0 Super_N=2 Super_N_bot=2 Super_TopBotSym=0 Super_Width=0.095172
    21  0           0       0.051744   0           1             0       0           0.000231    0           super ellipse Super_Height=0.035112 Super_M=2 Super_M_bot=2 Super_MaxWidthLoc=0 Super_N=2 Super_N_bot=2 Super_TopBotSym=0 Super_Width=0.0777315
    22  0           0       0.043659   0           1             0       0           0.0001155   0           super ellipse Super_Height=0.02772 Super_M=2 Super_M_bot=2 Super_MaxWidthLoc=0 Super_N=2 Super_N_bot=2 Super_TopBotSym=0 Super_Width=0.064449
    23  0           0       0.0363825  0           1             0       0           -0.0001155  0           super ellipse Super_Height=0.0231 Super_M=2 Super_M_bot=2 Super_MaxWidthLoc=0 Super_N=2 Super_N_bot=2 Super_TopBotSym=0 Super_Width=0.0555555
    24  0           0       0.0306075  0           1             0       0           0           0           super ellipse Super_Height=0.0231 Super_M=2 Super_M_bot=2 Super_MaxWidthLoc=0 Super_N=2 Super_N_bot=2 Super_TopBotSym=0 Super_Width=0.0458535
    25  0           0       0.0266805  0           1             0       0           0           0           general fuselage BotStr=1.5 BotTanAngle=90 CornerRad=0 Height=0.0231 LowStr=1.5 MaxWidthLoc=0 TopStr=1.5 TopTanAngle=90 UpStr=1.5 Width=0.0303765
    26  0           0       0.024486   0           1             0       0           0           0           general fuselage BotStr=1.5 BotTanAngle=90 CornerRad=0 Height=0.0231 LowStr=1.5 MaxWidthLoc=0 TopStr=1.5 TopTanAngle=90 UpStr=1.5 Width=0.0231
    27  0           0       0.28875    0           1             0       0           0           0           as above
    28  0           0       0.0462     0           1             0       0           0           0           point

Wing "vertical stabilizer", child of "ARDEA_D3_Stack"
  location (X Y Z) 1.5 0 0.057, rotation 90 0 0
  bounding box size 0.0960584 0.00961142 0.374124
  totals: TotalSpan=0.367423 TotalProjectedSpan=0.367423 TotalChord=0.0816497 TotalArea=0.03 TotalAR=4.5 MAC=0.0824972
  root: chord 0.0960584, twist 0, NACA 4-series Camber=0 CamberLoc=0.2 ThickChord=0.1
  sections:
    n  Span      Root_Chord  Tip_Chord  Area  Sweep  Sweep_Location  Dihedral  Twist  Twist_Location  tip airfoil
    1  0.367423  0.0960584   0.0672409  0.03  0      0.5             0         0      0.25            as above

Wing "Horizontal stabilizer", child of "ARDEA_D3_Stack"
  location (X Y Z) 1.5 0 0.046, rotation 0 0 0
  symmetric about XZ
  bounding box size 0.0960584 0.748248 0.00961142
  totals: TotalSpan=0.734847 TotalProjectedSpan=0.734847 TotalChord=0.0816497 TotalArea=0.06 TotalAR=9 MAC=0.0824972
  root: chord 0.0960584, twist 0, NACA 4-series Camber=0 CamberLoc=0.2 ThickChord=0.1
  sections:
    n  Span      Root_Chord  Tip_Chord  Area  Sweep  Sweep_Location  Dihedral  Twist  Twist_Location  tip airfoil
    1  0.367423  0.0960584   0.0672409  0.03  0      0.5             0         0      0.25            as above

Wing "Main Wing", child of "ARDEA_D3_Stack"
  location (X Y Z) 0.445 0 0, rotation 0 0.7 0
  symmetric about XZ
  bounding box size 0.308887 1.81625 0.0412929
  totals: TotalSpan=1.78885 TotalProjectedSpan=1.78885 TotalChord=0.223607 TotalArea=0.4 TotalAR=8 MAC=0.234331
  root: chord 0.308423, twist 0, NACA 4-series Camber=0.02 CamberLoc=0.4 ThickChord=0.12
  sections:
    n  Span      Root_Chord  Tip_Chord  Area  Sweep  Sweep_Location  Dihedral  Twist  Twist_Location  tip airfoil
    1  0.894427  0.308423    0.13879    0.2   0      0.5             0         0      0.25            NACA 4-series Camber=0 CamberLoc=0.2 ThickChord=0.1

VSPAERO settings (reference component "Main Wing"): Sref=0.4 bref=1.78885 cref=0.234331 Xcg=0.51 Ycg=0 Zcg=0 AlphaStart=-2 AlphaEnd=8 AlphaNpts=10 BetaStart=0 BetaEnd=0 BetaNpts=1 MachStart=0.245 MachEnd=0 MachNpts=1 ReCref=1.5e+06 Vinf=100 Rho=0.002377
